*HEADING
Template maxilla MVP - medium_kpa_plus_muscle_2n
*NODE
1, 0.00000000, 0.01900000, 0.01640000
2, 0.00262928, 0.01908942, 0.01644280
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*ELEMENT, TYPE=C3D8, ELSET=EALL
1, 46, 47, 2, 1, 631, 632, 587, 586
2, 47, 48, 3, 2, 632, 633, 588, 587
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*NSET, NSET=NALL
1, 2, 3, 4, 5, 6
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*NSET, NSET=NSET_FIXED
1, 46, 91, 136, 181, 226
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*NSET, NSET=NSET_PALATE
1, 2, 3, 4, 5, 6
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*NSET, NSET=NSET_MUSCLE_ALL
2341, 2342, 2343, 2344, 2345, 2346
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*ELSET, ELSET=ECORT_BIN_00
45, 46, 47, 48, 86, 87
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*ELSET, ELSET=ECORT_BIN_01
2, 3, 4, 42, 133, 134
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*ELSET, ELSET=ECORT_BIN_02
1, 43, 44, 177, 178, 219
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*ELSET, ELSET=ECORT_BIN_03
221, 264, 265, 266, 307, 308, 1629, 1631, 1632, 1670, 1672, 2025, 2068
*ELSET, ELSET=ECORT_BIN_04
1630, 1671
*ELSET, ELSET=ECORT_BIN_06
1588
*ELSET, ELSET=ECORT_BIN_07
1587, 1626
*ELSET, ELSET=ECORT_BIN_08
1586
*ELSET, ELSET=ECORT_BIN_09
1585, 1627, 1628
*ELSET, ELSET=ECANC_BIN_00
573, 574, 575, 576, 614, 615
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*ELSET, ELSET=ECANC_BIN_01
529, 530, 531, 532, 570, 571
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*ELSET, ELSET=ECANC_BIN_02
901, 902, 904, 927, 928, 945
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*ELSET, ELSET=ECANC_BIN_03
903, 946, 947, 973, 1008, 1429
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*ELSET, ELSET=ECANC_BIN_04
970, 972, 1011
*ELSET, ELSET=ECANC_BIN_05
971, 1009, 1010
*ELSET, ELSET=ETOOTHROOT
5, 6, 7, 8, 9, 10
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*MATERIAL, NAME=CORT_BIN_00
*ELASTIC
1.451235e+10, 0.300000
*DENSITY
1900.0
*MATERIAL, NAME=CORT_BIN_01
*ELASTIC
1.451612e+10, 0.300000
*DENSITY
1900.0
*MATERIAL, NAME=CORT_BIN_02
*ELASTIC
1.451988e+10, 0.300000
*DENSITY
1900.0
*MATERIAL, NAME=CORT_BIN_03
*ELASTIC
1.452364e+10, 0.300000
*DENSITY
1900.0
*MATERIAL, NAME=CORT_BIN_04
*ELASTIC
1.452741e+10, 0.300000
*DENSITY
1900.0
*MATERIAL, NAME=CORT_BIN_06
*ELASTIC
1.453494e+10, 0.300000
*DENSITY
1900.0
*MATERIAL, NAME=CORT_BIN_07
*ELASTIC
1.453871e+10, 0.300000
*DENSITY
1900.0
*MATERIAL, NAME=CORT_BIN_08
*ELASTIC
1.454247e+10, 0.300000
*DENSITY
1900.0
*MATERIAL, NAME=CORT_BIN_09
*ELASTIC
1.454624e+10, 0.300000
*DENSITY
1900.0
*MATERIAL, NAME=CANC_BIN_00
*ELASTIC
4.891038e+08, 0.300000
*DENSITY
800.0
*MATERIAL, NAME=CANC_BIN_01
*ELASTIC
4.891884e+08, 0.300000
*DENSITY
800.0
*MATERIAL, NAME=CANC_BIN_02
*ELASTIC
4.892729e+08, 0.300000
*DENSITY
800.0
*MATERIAL, NAME=CANC_BIN_03
*ELASTIC
4.893575e+08, 0.300000
*DENSITY
800.0
*MATERIAL, NAME=CANC_BIN_04
*ELASTIC
4.894420e+08, 0.300000
*DENSITY
800.0
*MATERIAL, NAME=CANC_BIN_05
*ELASTIC
4.895266e+08, 0.300000
*DENSITY
800.0
*MATERIAL, NAME=TOOTH_ROOT
*ELASTIC
2.000000e+10, 0.310000
*DENSITY
2100.0
*SOLID SECTION, ELSET=ECORT_BIN_00, MATERIAL=CORT_BIN_00
,
*SOLID SECTION, ELSET=ECORT_BIN_01, MATERIAL=CORT_BIN_01
,
*SOLID SECTION, ELSET=ECORT_BIN_02, MATERIAL=CORT_BIN_02
,
*SOLID SECTION, ELSET=ECORT_BIN_03, MATERIAL=CORT_BIN_03
,
*SOLID SECTION, ELSET=ECORT_BIN_04, MATERIAL=CORT_BIN_04
,
*SOLID SECTION, ELSET=ECORT_BIN_06, MATERIAL=CORT_BIN_06
,
*SOLID SECTION, ELSET=ECORT_BIN_07, MATERIAL=CORT_BIN_07
,
*SOLID SECTION, ELSET=ECORT_BIN_08, MATERIAL=CORT_BIN_08
,
*SOLID SECTION, ELSET=ECORT_BIN_09, MATERIAL=CORT_BIN_09
,
*SOLID SECTION, ELSET=ECANC_BIN_00, MATERIAL=CANC_BIN_00
,
*SOLID SECTION, ELSET=ECANC_BIN_01, MATERIAL=CANC_BIN_01
,
*SOLID SECTION, ELSET=ECANC_BIN_02, MATERIAL=CANC_BIN_02
,
*SOLID SECTION, ELSET=ECANC_BIN_03, MATERIAL=CANC_BIN_03
,
*SOLID SECTION, ELSET=ECANC_BIN_04, MATERIAL=CANC_BIN_04
,
*SOLID SECTION, ELSET=ECANC_BIN_05, MATERIAL=CANC_BIN_05
,
*SOLID SECTION, ELSET=ETOOTHROOT, MATERIAL=TOOTH_ROOT
,
*ELSET, ELSET=ESUTURE_MID
485, 486, 487, 488, 489, 490
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*ELSET, ELSET=ESUTURE_LAT
17, 18, 19, 20, 21, 22
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*MATERIAL, NAME=SUTURE
*ELASTIC
5.000000e+07, 0.300000
*DENSITY
1200.0
*SOLID SECTION, ELSET=ESUTURE_MID, MATERIAL=SUTURE
,
*SOLID SECTION, ELSET=ESUTURE_LAT, MATERIAL=SUTURE
,
*STEP
*STATIC
1., 1.
*BOUNDARY
NSET_FIXED, 1, 3, 0.0
*CLOAD
1, 1, -7.208524e-05
1, 2, 2.088760e-03
1, 3, -1.200619e-03
2, 1, -2.124968e-05
2, 2, 2.273390e-03
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585, 3, -1.467172e-03
*CLOAD
2341, 1, -1.105597e-02
2341, 2, 5.527984e-03
2341, 3, -2.487593e-02
2386, 1, -1.105597e-02
2386, 2, 5.527984e-03
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2520, 3, -2.238834e-02
*NODE FILE
U
*EL FILE
S, ENER
*NODE PRINT, NSET=NALL
U
*EL PRINT, ELSET=EALL
S
*EL PRINT, ELSET=EALL
ENER
*END STEP
